<?xml version="1.0"?>

<turboprop_engine name="PT6A-67D Derate">
  <milthrust unit="LBS">2400</milthrust>
  <idlen1>33.0</idlen1>
  <maxn1>115.0</maxn1>
  <maxpower unit="HP">1500</maxpower>
  <psfc unit="LBS/HR/HP">0.23</psfc>
  <n1idle_max_delay>2</n1idle_max_delay>
  <maxstartingtime>10</maxstartingtime>
  <startern1>40</startern1>
  <ielumaxtorque unit="FT*LB">800</ielumaxtorque>
  <itt_delay>0.15</itt_delay>
  <betarangeend>40</betarangeend>
  <reversemaxpower>105</reversemaxpower>

  <table name="EnginePowerVC">
    <description> Engine power, function of airspeed and pressure </description>
    <independentVar lookup="row">atmosphere/P-psf</independentVar>
    <independentVar lookup="column">velocities/ve-kts</independentVar>
    <tableData>
	0	50	100	150	200	250	300
503	0.630	0.788	0.829	0.836	0.840	0.841	0.845
1048	0.685	0.856	0.901	0.909	0.913	0.914	0.919
1328	0.721	0.901	0.949	0.957	0.961	0.962	0.967
1496	0.743	0.929	0.978	0.986	0.991	0.992	0.997
1684	0.751	0.939	0.988	0.996	1.001	1.002	1.007
1896	0.759	0.948	0.998	1.006	1.011	1.012	1.017
2135	0.764	0.955	1.006	1.014	1.019	1.020	1.025
2213	0.768	0.960	1.011	1.019	1.024	1.025	1.030

    </tableData>
  </table>

  <table name="EnginePowerRPM_N1" type="internal">
    <description> Engine Power, function of RPM and N1 </description>
    <tableData>
	0	5	35	70	88	94	100	115
0	.00	.50	.50	.50	.50	.50	.50	.50
500	.00	.50	9.81	99.05	76.11	105.48	185.80	220.0
1600	.00	.50	11.00	50.80	90.00	150.00	290.64	340.0
1900	.00	.50	14.00	79.88	140.00	210.00	310.60	380.0
2150	.00	.50	15.00	125.0	250.88	290.00	350.80	422.0
3150	.00	.50	17.00	170.00	350.00	400.00	470.00	500.0
3600	.00	.50	22.00	330.00	410.00	490.00	540.00	560.0
5400	.00	.50	29.00	390.00	490.00	670.00	960.00	1240.0
7000	.00	.50	35.00	450.00	560.00	850.00	1050.00	1500.0

    </tableData>
  </table>

  <table name="ITT_N1" type="internal">
    <description> Inter-Turbine Temperature ITT [deg C] depending on N1 and engine run (0=off / 1=running) </description>
    <tableData>
              0     1
        0     0     0
        30   90   370
        65   180   550
      115   300   800
    </tableData>
  </table>

  <table name="CombustionEfficiency_N1" type="internal">
    <tableData>
	035	0.40
	070	0.823
	088	0.899
	094	0.92
	100	1.00
	120	0.77
     </tableData>
  </table>

</turboprop_engine>
