<?xml version="1.0"?>

<piston_engine name="overboosted motorbike engine">
	<minmp unit="INHG">		    10.0  </minmp>
	<maxmp unit="INHG">		   28.0  </maxmp>
	<displacement unit="CC">   655.0</displacement>
	<stroke unit="IN">			3.875</stroke>
	<cylinders>					4.0  </cylinders>
	<compression-ratio>			11  </compression-ratio>
	<maxhp> 				  102.0  </maxhp>
	<cycles>				  4.0  </cycles>
	<idlerpm>				  803.0  </idlerpm>
	<maxrpm>				14000.0  </maxrpm>
	<sparkfaildrop>				0.1  </sparkfaildrop>
	<volumetric-efficiency>		1.03 </volumetric-efficiency>
	<air-intake-impedance-factor>0.35</air-intake-impedance-factor>
	<numboostspeeds>1</numboostspeeds>
	<boost-loss-factor>2.2</boost-loss-factor> <!-- It's a turbo, not a goddamned super. This should probably be lower(!)-->
	<ratedboost1>        26 </ratedboost1>
	<ratedpower1>       235 </ratedpower1>
	<ratedrpm1>       11500 </ratedrpm1>
	<ratedaltitude1>   6700 </ratedaltitude1>
	<man-press-lag>     1.5 </man-press-lag> <!-- to simulate turbo lag -->
	<boostmanual>         0 </boostmanual>
	<!-- Optional items that affect engine performance -->
	<!-- Defining <bsfc> over-rides the built-in horsepower calculations -->
	<bsfc>						0.33</bsfc>
	<!-- <bsfc>						0.326</bsfc> -->
</piston_engine>
