<?xml version="1.0"?>

<piston_engine name="fictional 2985cm³ high-com diesel">
	<minmp unit="INHG">		   26.0  </minmp>
	<maxmp unit="INHG">		   29.0  </maxmp>
	<displacement unit="CC"> 2985 </displacement>
	<stroke unit="IN">			6</stroke>
	<cylinders>					4.0  </cylinders>
	<compression-ratio>			18.3  </compression-ratio>
	<maxhp> 				  323.0  </maxhp>
	<cycles>					4.0  </cycles>
	<idlerpm>				  750.0  </idlerpm>
	<maxrpm>				 2460.0  </maxrpm>
	<sparkfaildrop>				0.5  </sparkfaildrop>
	<volumetric-efficiency>		0.93 </volumetric-efficiency>
	<air-intake-impedance-factor>0.34</air-intake-impedance-factor>
	<numboostspeeds>1</numboostspeeds>
	<boost-loss-factor>0.1</boost-loss-factor> <!-- It's a turbo, not a goddamned super. This should probably be lower(!)-->
	<ratedboost1>        10 </ratedboost1>
	<ratedpower1>       210 </ratedpower1>
	<ratedrpm1>        2460 </ratedrpm1>
	<ratedaltitude1>  10000 </ratedaltitude1>
	<man-press-lag>     1.5 </man-press-lag> <!-- to simulate turbo lag -->
	<boostmanual>         0 </boostmanual>
	<!-- Optional items that affect engine performance -->
	<!-- Defining <bsfc> over-rides the built-in horsepower calculations -->
</piston_engine>
