<?xml version="1.0"?>

<piston_engine name="Continental _TSIO-360-G with an owner who's put a bigger turbo on it">
	<minmp unit="INHG">		    7.5  </minmp>
	<maxmp unit="INHG">		   26.8  </maxmp>
	<displacement unit="IN3"> 360.0  </displacement>
	<bore unit="IN">			4.438</bore>
	<stroke unit="IN">			3.875</stroke>
	<cylinders>					6.0  </cylinders>
	<compression-ratio>			 10.0  </compression-ratio>
	<maxhp> 				  350.0  </maxhp>
	<cycles>				    4.0  </cycles>
	<idlerpm>				  203.0  </idlerpm>
	<maxrpm>				 2850.0  </maxrpm>
	<sparkfaildrop>				0.1  </sparkfaildrop>
	<volumetric-efficiency>		0.90 </volumetric-efficiency>
	<air-intake-impedance-factor>0.25</air-intake-impedance-factor>
	<numboostspeeds>2</numboostspeeds>
	<boost-loss-factor>0.6</boost-loss-factor> <!-- It's a turbo, not a goddamned super. This should probably be lower(!)-->
	<ratedboost1>      16.3 </ratedboost1>
	<ratedpower1>       260 </ratedpower1>
	<ratedrpm1>        3150 </ratedrpm1>
	<ratedaltitude1>  33000 </ratedaltitude1>
	<ratedboost2>         1 </ratedboost2>
	<ratedpower2>       210 </ratedpower2>
	<ratedrpm2>        3150 </ratedrpm2>
	<ratedaltitude2>  33000 </ratedaltitude2>
	<man-press-lag>     2.2 </man-press-lag> <!-- to simulate turbo lag -->
	<boostmanual>         1 </boostmanual>
	<!-- Optional items that affect engine performance -->
	<!-- Defining <bsfc> over-rides the built-in horsepower calculations -->
	<bsfc>						0.35</bsfc>
</piston_engine>
