<?xml version="1.0"?>
<!-- Generated by Aero-Matic v 1.1

     Inputs:
                horsepower: 210.0
                     pitch: variable
            max engine rpm: 2800
        prop diameter (ft): 6.33393769

     Outputs:
              max prop rpm: 2962.30
                gear ratio:    0.95
                       Cp0: 0.039589
                       Ct0: 0.092241
       static thrust (lbs):  860.57
-->

<propeller name="prop">
  <ixx>					3.44 </ixx>
  <diameter unit="IN"> 76.0  </diameter>
  <numblades>			4  </numblades> <!-- The pentastar redlines at 6.4kRPM - 5.8kRPM is a reasonable "max power RPM". The horsepower is MUCH higher on it at that RPM so
  a 3 bladed prop is reasonable. I rescind my rescission of that. ~~ c-eytt-->
  <gearratio>			0.85</gearratio> <!-- Mother of god, why did you choose to put a PENTASTAR 3.6 where the goddamned 5.9 belongs? You need a crazy ratio on that. ~~ ellenor C-EYTT -->
  <p_factor>			6.00 </p_factor>
  <minpitch>		   10    </minpitch>
  <maxpitch>		   62    </maxpitch>
  <minrpm>			  900    </minrpm>
  <maxrpm>			 2560    </maxrpm>
  <constspeed>			1    </constspeed>

 <!-- thrust coefficient as a function of advance ratio and blade angle -->
<!-- new aeromat -->

  <table name="C_THRUST" type="internal">
      <tableData>
                -10        0         15        25        35        45        55        65       90
      -0.2      -0.0607    0.0342    0.1243    0.1523    0.1678    0.1772    0.1632    0.1399   0.0000
       0.0      -0.0901    0.0000    0.1243    0.1523    0.1678    0.1788    0.1671    0.1399   0.0000
       0.2      -0.1011   -0.0311    0.1073    0.1492    0.1655    0.1788    0.1671    0.1399   0.0000
       0.4      -0.1011   -0.0722    0.0808    0.1477    0.1624    0.1772    0.1671    0.1399   0.0000
       0.6      -0.1011   -0.1011    0.0428    0.1329    0.1554    0.1726    0.1647    0.1399   0.0000
       0.8      -0.1011   -0.1011    0.0024    0.0995    0.1508    0.1664    0.1647    0.1399   0.0000
       1.0      -0.1011   -0.1011   -0.0404    0.0607    0.1446    0.1578    0.1632    0.1399   0.0000
       1.2      -0.1011   -0.1011   -0.0832    0.0186    0.1189    0.1523    0.1632    0.1399   0.0000
       1.4      -0.1011   -0.1011   -0.1011   -0.0272    0.0855    0.1499    0.1601    0.1399   0.0000
       1.6      -0.1011   -0.1011   -0.1011   -0.0691    0.0466    0.1446    0.1570    0.1399   0.0000
       1.8      -0.1011   -0.1011   -0.1011   -0.1011    0.0078    0.1243    0.1523    0.1399   0.0000
       2.0      -0.1011   -0.1011   -0.1011   -0.1011   -0.0311    0.0971    0.1517    0.1399   0.0000
       2.2      -0.1011   -0.1011   -0.1011   -0.1011   -0.0700    0.0700    0.1492    0.1399   0.0000
       2.4      -0.1011   -0.1011   -0.1011   -0.1011   -0.1011    0.0373    0.1218    0.1399   0.0000
       2.6      -0.1011   -0.1011   -0.1011   -0.1011   -0.1011    0.0047    0.0771    0.1243   0.0000
       2.8      -0.1011   -0.1011   -0.1011   -0.1011   -0.1011   -0.0280    0.0505    0.1011   0.0000
       3.0      -0.1011   -0.1011   -0.1011   -0.1011   -0.1011   -0.0607    0.0265    0.0777   0.0000
       3.2      -0.1011   -0.1011   -0.1011   -0.1011   -0.1011   -0.0932    0.0024    0.0545   0.0000
       3.4      -0.1011   -0.1011   -0.1011   -0.1011   -0.1011   -0.1011   -0.0218    0.0311   0.0000
       3.6      -0.1011   -0.1011   -0.1011   -0.1011   -0.1011   -0.1011   -0.0459    0.0078   0.0000
       3.8      -0.1011   -0.1011   -0.1011   -0.1011   -0.1011   -0.1011   -0.0700   -0.0155   0.0000
       4.0      -0.1011   -0.1011   -0.1011   -0.1011   -0.1011   -0.1011   -0.0940   -0.0389   0.0000
       6.0      -0.1011   -0.1011   -0.1011   -0.1011   -0.1011   -0.1011   -0.1011   -0.1011   0.0000
      </tableData>
  </table>

 <!-- power coefficient as a function of advance ratio and blade angle -->
  <table name="C_POWER" type="internal">
     <tableData>
               -10        0        15        25        35        45        55        65       90
      -0.2      0.0089   0.0178    0.0623    0.1414    0.2439    0.3468    0.4002    0.4429   0.4429
       0.0      0.0356   0.0089    0.0534    0.1318    0.2332    0.3468    0.4018    0.4429   0.4429
       0.2      0.0507   0.0142    0.0516    0.1227    0.2230    0.3468    0.4018    0.4429   0.4429
       0.4      0.0683   0.0311    0.0444    0.1131    0.2118    0.3468    0.4018    0.4429   0.4429
       0.6      0.0838   0.0471    0.0293    0.1051    0.1985    0.3399    0.4002    0.4429   0.4429
       0.8      0.0987   0.0631    0.0089    0.0891    0.1868    0.3244    0.4002    0.4429   0.4429
       1.0      0.1137   0.0784    0.0089    0.0624    0.1761    0.3079    0.3986    0.4429   0.4429
       1.2      0.1291   0.0627   -0.0293    0.0240    0.1558    0.2951    0.3959    0.4429   0.4429
       1.4      0.1441   0.1083   -0.0443   -0.0178    0.1201    0.2908    0.3911    0.4429   0.4429
       1.6      0.1590   0.1238   -0.0518   -0.0534    0.0758    0.2828    0.3826    0.4269   0.4429
       1.8      0.1745   0.1387   -0.0534   -0.0891    0.0223    0.2508    0.3709    0.4178   0.4429
       2.0      0.1894   0.1537   -0.0683   -0.1243   -0.0267    0.2134    0.3532    0.4093   0.4429
       2.2      0.2044   0.1692   -0.0838   -0.1601   -0.0800    0.1734    0.3426    0.3911   0.4429
       2.4      0.2198   0.1841   -0.0987   -0.1958   -0.1334    0.1238    0.3324    0.3826   0.4429
       2.6      0.2348   0.1990   -0.1137   -0.2311   -0.1692    0.0518    0.3244    0.3693   0.4429
       2.8      0.2497   0.2145   -0.1291   -0.2668   -0.2028   -0.0176    0.3175    0.3645   0.4429
       3.0      0.2652   0.2294   -0.1441   -0.3026   -0.2401   -0.0800    0.3068    0.3645   0.4429
       3.2      0.2801   0.2444   -0.1590   -0.3378   -0.2759   -0.1425    0.2871    0.3559   0.4429
       3.4      0.2951   0.2599   -0.1745   -0.3735   -0.3111   -0.2044    0.2225    0.3468   0.4429
       3.6      0.3106   0.2748   -0.1894   -0.4093   -0.3468   -0.2668    0.1563    0.3378   0.4429
       3.8      0.3255   0.2897   -0.2044   -0.4429   -0.3826   -0.3292    0.0870    0.3271   0.4429
       4.0      0.3404   0.3052   -0.2198   -0.4429   -0.4429   -0.3911    0.0176    0.3026   0.4429
       6.0      0.4429   0.4429   -0.4429   -0.4429   -0.4429   -0.4429   -0.4429   -0.2668   0.4429
     </tableData>
  </table>

<!-- thrust effects of helical tip Mach -->
<table name="CT_MACH" type="internal">
  <tableData>
    0.85   1.0
    1.05   0.8
    1.90   1.0
  </tableData>
</table>

<!-- power-required effects of helical tip Mach -->
<table name="CP_MACH" type="internal">
  <tableData>
    0.85   1.0
    1.05   1.8
    2.00   1.4
  </tableData>
</table>

</propeller>
