<?xml version="1.0"?>
<!-- Generated by Aero-Matic v 1.1

     Inputs:
                horsepower: 210.0
                     pitch: variable
            max engine rpm: 2800
        prop diameter (ft): 6.33393769

     Outputs:
              max prop rpm: 2962.30
                gear ratio:    0.95
                       Cp0: 0.039589
                       Ct0: 0.092241
       static thrust (lbs):  860.57
-->

<propeller name="prop">
  <ixx>					3.43 </ixx>
  <diameter unit="IN"> 77.0  </diameter>
  <numblades>			9    </numblades>
  <gearratio>			1.5</gearratio> <!-- riced final drive ratio -->
  <p_factor>			8.00 </p_factor>
  <minpitch>		   10    </minpitch>
  <maxpitch>		   73    </maxpitch>
  <reversepitch>		  -25    </reversepitch>
  <minrpm>			 1100    </minrpm>
  <maxrpm>			 2860    </maxrpm>
  <constspeed>			1    </constspeed>


 <!-- thrust coefficient as a function of advance ratio and blade angle -->
  <table name="C_THRUST" type="internal">
      <tableData>
                -10        0         15        25        35        45        55        65       90
      -0.2      -0.0450    0.0254    0.0922    0.1130    0.1245    0.1314    0.1211    0.1038   0.0000
       0.0      -0.0669    0.0000    0.0922    0.1130    0.1245    0.1326    0.1240    0.1038   0.0000
       0.2      -0.0750   -0.0231    0.0796    0.1107    0.1228    0.1326    0.1240    0.1038   0.0000
       0.4      -0.0750   -0.0536    0.0600    0.1096    0.1205    0.1314    0.1240    0.1038   0.0000
       0.6      -0.0750   -0.0750    0.0317    0.0986    0.1153    0.1280    0.1222    0.1038   0.0000
       0.8      -0.0750   -0.0750    0.0018    0.0738    0.1119    0.1234    0.1222    0.1038   0.0000
       1.0      -0.0750   -0.0750   -0.0300    0.0450    0.1073    0.1171    0.1211    0.1038   0.0000
       1.2      -0.0750   -0.0750   -0.0617    0.0138    0.0882    0.1130    0.1211    0.1038   0.0000
       1.4      -0.0750   -0.0750   -0.0750   -0.0202    0.0635    0.1112    0.1188    0.1038   0.0000
       1.6      -0.0750   -0.0750   -0.0750   -0.0513    0.0346    0.1073    0.1165    0.1038   0.0000
       1.8      -0.0750   -0.0750   -0.0750   -0.0750    0.0058    0.0922    0.1130    0.1038   0.0000
       2.0      -0.0750   -0.0750   -0.0750   -0.0750   -0.0231    0.0720    0.1125    0.1038   0.0000
       2.2      -0.0750   -0.0750   -0.0750   -0.0750   -0.0519    0.0519    0.1107    0.1038   0.0000
       2.4      -0.0750   -0.0750   -0.0750   -0.0750   -0.0750    0.0277    0.0904    0.1038   0.0000
       2.6      -0.0750   -0.0750   -0.0750   -0.0750   -0.0750    0.0035    0.0572    0.0922   0.0000
       2.8      -0.0750   -0.0750   -0.0750   -0.0750   -0.0750   -0.0208    0.0374    0.0750   0.0000
       3.0      -0.0750   -0.0750   -0.0750   -0.0750   -0.0750   -0.0450    0.0196    0.0577   0.0000
       3.2      -0.0750   -0.0750   -0.0750   -0.0750   -0.0750   -0.0692    0.0018    0.0404   0.0000
       3.4      -0.0750   -0.0750   -0.0750   -0.0750   -0.0750   -0.0750   -0.0161    0.0231   0.0000
       3.6      -0.0750   -0.0750   -0.0750   -0.0750   -0.0750   -0.0750   -0.0340    0.0058   0.0000
       3.8      -0.0750   -0.0750   -0.0750   -0.0750   -0.0750   -0.0750   -0.0519   -0.0115   0.0000
       4.0      -0.0750   -0.0750   -0.0750   -0.0750   -0.0750   -0.0750   -0.0697   -0.0289   0.0000
       6.0      -0.0750   -0.0750   -0.0750   -0.0750   -0.0750   -0.0750   -0.0750   -0.0750   0.0000
      </tableData>
  </table>

 <!-- power coefficient as a function of advance ratio and blade angle -->
  <table name="C_POWER" type="internal">
     <tableData>
               -10        0        15        25        35        45        55        65       90
      -0.2      0.0066   0.0132    0.0462    0.1049    0.1809    0.2573    0.2969    0.3286   0.3286
       0.0      0.0264   0.0066    0.0396    0.0978    0.1730    0.2573    0.2981    0.3286   0.3286
       0.2      0.0376   0.0106    0.0383    0.0911    0.1655    0.2573    0.2981    0.3286   0.3286
       0.4      0.0507   0.0231    0.0330    0.0839    0.1572    0.2573    0.2981    0.3286   0.3286
       0.6      0.0622   0.0350    0.0218    0.0780    0.1473    0.2522    0.2969    0.3286   0.3286
       0.8      0.0732   0.0468    0.0066    0.0661    0.1386    0.2407    0.2969    0.3286   0.3286
       1.0      0.0843   0.0582    0.0066    0.0463    0.1306    0.2284    0.2957    0.3286   0.3286
       1.2      0.0958   0.0465   -0.0218    0.0178    0.1156    0.2189    0.2937    0.3286   0.3286
       1.4      0.1069   0.0804   -0.0329   -0.0132    0.0891    0.2158    0.2902    0.3286   0.3286
       1.6      0.1180   0.0918   -0.0384   -0.0396    0.0562    0.2098    0.2838    0.3167   0.3286
       1.8      0.1295   0.1029   -0.0396   -0.0661    0.0165    0.1861    0.2751    0.3100   0.3286
       2.0      0.1405   0.1140   -0.0507   -0.0922   -0.0198    0.1584    0.2621    0.3036   0.3286
       2.2      0.1516   0.1255   -0.0622   -0.1188   -0.0594    0.1287    0.2542    0.2902   0.3286
       2.4      0.1631   0.1366   -0.0732   -0.1453   -0.0990    0.0918    0.2466    0.2838   0.3286
       2.6      0.1742   0.1477   -0.0843   -0.1714   -0.1255    0.0384    0.2407    0.2740   0.3286
       2.8      0.1853   0.1591   -0.0958   -0.1979   -0.1504   -0.0131    0.2356    0.2704   0.3286
       3.0      0.1968   0.1702   -0.1069   -0.2245   -0.1781   -0.0594    0.2276    0.2704   0.3286
       3.2      0.2078   0.1813   -0.1180   -0.2506   -0.2047   -0.1057    0.2130    0.2641   0.3286
       3.4      0.2189   0.1928   -0.1295   -0.2771   -0.2308   -0.1516    0.1651    0.2573   0.3286
       3.6      0.2304   0.2039   -0.1405   -0.3036   -0.2573   -0.1979    0.1160    0.2506   0.3286
       3.8      0.2415   0.2150   -0.1516   -0.3286   -0.2838   -0.2443    0.0645    0.2427   0.3286
       4.0      0.2526   0.2264   -0.1631   -0.3286   -0.3286   -0.2902    0.0131    0.2245   0.3286
       6.0      0.3286   0.3286   -0.3286   -0.3286   -0.3286   -0.3286   -0.3286   -0.1979   0.3286
     </tableData>
  </table>

<!-- thrust effects of helical tip Mach -->
<table name="CT_MACH" type="internal">
  <tableData>
    0.85   1.0
    1.05   0.8
  </tableData>
</table>

<!-- power-required effects of helical tip Mach -->
<table name="CP_MACH" type="internal">
  <tableData>
    0.85   1.0
    1.05   1.8
    2.00   1.4
  </tableData>
</table>

</propeller>
